$PROB  1 CMT PK model with oral absorption
$INPUT
ID CMT AMT TIME DV EVID MDV WEIGHT
$DATA input.csv IGNORE=@
$SUBROUTINES  ADVAN6 TOL=3
$MODEL
COMP = (ABS)
COMP = (CENTRAL)

$PK
COV1 = (WEIGHT/70)**THETA(4)
KA = THETA(1) * COV1 * EXP(ETA(1))
CL = THETA(2) * EXP(ETA(2))
V  = THETA(3)
S2  = V
K20 = CL/V
F1  = 1

$DES
CP = A(2)/V
DADT(1) = - KA*A(1)
DADT(2) =   KA*A(1) - K20*A(2)

$THETA
(0,.1)  ; KA (1/h)
(0,2)    ; CL (l/h)
(0,1)    ; V (l)
0.2      ; effect of WT

$OMEGA
.01 ; ETA KA
.02 ; ETA CL

$ERROR
Y = F * (1 + EPS(1))
IPRED = F

$SIGMA
.1 ; Prop. error

$EST METHOD=1 INTERACTION MAXEVAL=9999  PRINT=5 NOABORT POSTHOC
$COV COMP
$TABLE  ID TIME ETA1 ETA2 KA CP NOPRINT ONEHEADER FILE=par
